C := READWAV("S1.wav")
[N; fd; Q; B]
W := GETWAVINFO("S1.wav")
W := GETWAVINFO("S1.wav")
M := READBIN("3.txt", "byte")
# Let's set the function for converting a number from decimal to binary:
D2B(x) :=
    for i ∈ 0 .. 7
        V[i] ← mod(x, 2)
        x ← floor(x/2)
    V
W =  # no stored result
# Let's translate the message into binary form:
M_b :=
    for i ∈ 0 .. rows(M) - 1
        b ← D2B(M[i])
        for j ∈ 0 .. 7
            m[8*i + j] ← b[j]
    m
m :=
    for i ∈ 0 .. rows(M_b) - 1
        m[i] ← 1 if M_b[i] == 1
        m[i] ← -1 if M_b[i] == 0
    m
part := rows(C) - 1
# Let's copy a part of the audio file:
m =  # no stored result
S :=
    for i ∈ 0 .. part
        S[i] ← C[i, 0]
    S
S =  # no stored result
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# Let's plot the audio file:
n := 1024
segments := ceil(part/n) - 2
# Let's split the audio container into segments segments:
Seg :=
    for i ∈ 0 .. segments
        Seg[i] ← submatrix(S, i*n, (i + 1)*n - 1, 0, 0)
    Seg
Seg[30] =  # no stored result
# Download Signals
ReadSignal :=
    for i ∈ 0 .. 1023
        for j ∈ 0 .. 1023
            u[j] ← rnd(1)
            f_1[j] ← dnorm(u[j], 0, 1)
            u1[j] ← u[j] + 0.5 if u[j] < 0.5
            u1[j] ← u[j] - 0.5 if u[j] ≥ 0.5
            f1[j] ← qnorm(u1[j], 0, 1)
        ReadSignal[i, 0] ← f_1
        ReadSignal[i, 1] ← f1
    ReadSignal
MultString(A, B) :=
    X ← 0
    for i ∈ 0 .. rows(A) - 1
        X ← X + A[i]*B[i]
    X
MultString(ReadSignal[10], ReadSignal[101]) =  # no stored result
Auto :=
    for g ∈ 1 .. 20
        for k ∈ 1 .. 10
            for i ∈ 0 .. rows(Seg) - 1
                a ← 0
                for j ∈ 0 .. 9
                    a ← a + M_b[k*i + j]*2^j
                M_d[i] ← a
            for i ∈ 0 .. rows(Seg) - 1
                g1 ← g/4
                Sum2[i] ← 0
                Sum2[i] ← Sum2[i] + g1*ReadSignal[M_d[i], 0] if m[k*i + M_d[i]] == -1
                Sum2[i] ← Sum2[i] + g1*ReadSignal[M_d[i], 1] if m[k*i + M_d[i]] == 1
                Seg1[i] ← Seg[i] + Sum2[i]
            M_b1 ← 0
            for i ∈ 0 .. rows(Seg) - 1
                f ← 0
                for j ∈ 0 .. 1023
                    a ← MultString(Seg1[i], ReadSignal[j, 0])
                    b ← MultString(Seg1[i], ReadSignal[j, 1])
                    c ← a if a > b
                    c ← b if a ≤ b
                    if c > f
                        f ← c
                        M_d1[i] ← j
            for i ∈ 0 .. rows(Seg) - 1
                x ← M_d1[i]
                for j ∈ 0 .. 9
                    M_b1[i*k + j] ← mod(x, 2)
                    x ← floor(x/2)
            A ← 0
            for i ∈ 0 .. rows(M_b1) - 1
                A ← A + 1 if M_b1[i] ≠ M_b[i]
            BER[g, k] ← A/rows(M_b1)
            A ← 0
            for i ∈ 0 .. rows(Seg) - 1
                for j ∈ 0 .. 1023
                    A ← A + (Seg[i][j] - Seg1[i][j])^2
            MSE[g, k] ← A/(rows(Seg1)*1024)
            PSNR[g, k] ← 20*log(255, 10) - 10*log(MSE[g, k], 10)
            A ← 0
            B ← 0
            for i ∈ 0 .. rows(Seg) - 1
                for j ∈ 0 .. n - 1
                    A ← A + Sum2[i][j]^2
                    B ← B + Seg[i][j]^2
            SNR[g, k] ← 20*log(sqrt(A/B), 10)
    Auto[1] ← BER
    Auto[2] ← MSE
    Auto[3] ← PSNR
    Auto[4] ← SNR
    Auto
BER := Auto[1]
a := WRITEPRN("BER.prn", BER)
MSE := Auto[2]
c =  # no stored result
b := WRITEPRN("MSE.prn", MSE)
PSNR := Auto[3]
c := WRITEPRN("PSNR.prn", PSNR)
SNR := Auto[4]
f := WRITEPRN("SNR.prn", SNR)
b =  # no stored result
a =  # no stored result
