C := READWAV("S1.wav")
[N; fd; Q; B]
W := GETWAVINFO("S1.wav")
W := GETWAVINFO("S1.wav")
M := READBIN("3.txt", "byte")
# Let's set the function for converting a number from decimal to binary:
D2B(x) :=
    for i ∈ 0 .. 7
        V[i] ← mod(x, 2)
        x ← floor(x/2)
    V
W =  # no stored result
# Let's translate the message into binary form:
M_b :=
    for i ∈ 0 .. rows(M) - 1
        b ← D2B(M[i])
        for j ∈ 0 .. 7
            m[8*i + j] ← b[j]
    m
m :=
    for i ∈ 0 .. rows(M_b) - 1
        m[i] ← 1 if M_b[i] == 1
        m[i] ← -1 if M_b[i] == 0
    m
part := rows(C) - 1
# Let's copy a part of the audio file:
m =  # no stored result
S :=
    for i ∈ 0 .. part
        S[i] ← C[i, 0]
    S
S =  # no stored result
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# Let's plot the audio file:
n := 1024
segments := ceil(part/n) - 2
# Let's split the audio container into segments segments:
Seg :=
    for i ∈ 0 .. segments
        Seg[i] ← submatrix(S, i*n, (i + 1)*n - 1, 0, 0)
    Seg
Seg[30] =  # no stored result
# Download Signals
ReadSignal :=
    for i ∈ 0 .. 1023
        for j ∈ 0 .. 1023
            b ← ceil(rnd(2)) - 1
            a[j] ← 1 if b == 1
            a[j] ← -1 if b == 0
        ReadSignal[i] ← a
    ReadSignal
MultString(A, B) :=
    X ← 0
    for i ∈ 0 .. rows(A) - 1
        X ← X + A[i]*B[i]
    X
ReadSignal[1] =  # no stored result
MultString(ReadSignal[10], ReadSignal[101]) =  # no stored result
Auto :=
    for g ∈ 1 .. 20
        for k ∈ 1 .. 10
            for i ∈ 0 .. rows(Seg) - 1
                g1 ← g/4
                Sum[i] ← sum(g1*(m[k*i + j]*ReadSignal[j + 1]), j = 0 .. k - 1)
                Seg1[i] ← Seg[i] + Sum[i]
            m1 ← 0
            for i ∈ 0 .. rows(Seg) - 1
                for j ∈ 0 .. k - 1
                    ro ← MultString(Seg1[i], ReadSignal[j + 1])
                    m1[k*i + j] ← 1 if ro > 0
                    m1[k*i + j] ← -1 if ro ≤ 0
            A ← 0
            for i ∈ 0 .. rows(m1) - 1
                A ← A + 1 if m1[i] ≠ m[i]
            BER[g, k] ← A/rows(m1)
            A ← 0
            for i ∈ 0 .. rows(Seg) - 1
                for j ∈ 0 .. 1023
                    A ← A + (Seg[i][j] - Seg1[i][j])^2
            MSE[g, k] ← A/(rows(Seg1)*1024)
            PSNR[g, k] ← 20*log(255, 10) - 10*log(MSE[g, k], 10)
            A ← 0
            B ← 0
            for i ∈ 0 .. rows(Seg) - 1
                for j ∈ 0 .. n - 1
                    A ← A + Sum[i][j]^2
                    B ← B + Seg[i][j]^2
            SNR[g, k] ← 20*log(sqrt(A/B), 10)
    Auto[1] ← BER
    Auto[2] ← MSE
    Auto[3] ← PSNR
    Auto[4] ← SNR
    Auto
BER := Auto[1]
a := WRITEPRN("BER.prn", BER)
c =  # no stored result
MSE := Auto[2]
b := WRITEPRN("MSE.prn", MSE)
PSNR := Auto[3]
c := WRITEPRN("PSNR.prn", PSNR)
SNR := Auto[4]
f := WRITEPRN("SNR.prn", SNR)
a =  # no stored result
b =  # no stored result
f =  # no stored result
